*Heading
** Job name: ellipse_1hole Model name: Model-1
** Generated by: Abaqus/CAE 2018
*Preprint, echo=NO, model=NO, history=NO, contact=NO
**
** PARTS
**
*Part, name=ellipse_1hole
*End Part
**
**
** ASSEMBLY
**
*Assembly, name=Assembly
**
*Instance, name=ellipse_1hole-1, part=ellipse_1hole
*Node
      1,  0.980000019,           0.
      2,  0.959999979,           0.
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*Element, type=CPS8R
    1,  2242,    47,  2715,  9378, 11592, 11593, 11594, 11595
    2,  9378,  2347,    49,  2242, 11596, 11597, 11598, 11595
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*Nset, nset=Set-1, generate
     1,  34507,      1
*Elset, elset=Set-1, generate
     1,  11325,      1
** Section: hole
*Solid Section, elset=Set-1, material=linear
,
*End Instance
**
*Nset, nset=Set-27, instance=ellipse_1hole-1
   193,   194,   195,   196,   197,   198
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*Elset, elset=Set-27, instance=ellipse_1hole-1
  872,  873,  874,  875,  876,  913
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*Elset, elset=_Surf-15_S1, internal, instance=ellipse_1hole-1
    1,   50,   98,   99,  145,  147
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*Elset, elset=_Surf-15_S3, internal, instance=ellipse_1hole-1
    2,   48,  146,  238,  331,  376
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*Elset, elset=_Surf-15_S4, internal, instance=ellipse_1hole-1
 1935,
*Surface, type=ELEMENT, name=Surf-15
_Surf-15_S1, S1
_Surf-15_S3, S3
_Surf-15_S4, S4
*Elset, elset=_Surf-16_S1, internal, instance=ellipse_1hole-1
 1046, 1048, 1050, 1312, 1315, 1324
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*Elset, elset=_Surf-16_S3, internal, instance=ellipse_1hole-1
 1313, 1913, 1920, 1935, 3804, 3807, 3841, 4102, 4179
*Elset, elset=_Surf-16_S2, internal, instance=ellipse_1hole-1
 3758,
*Surface, type=ELEMENT, name=Surf-16
_Surf-16_S1, S1
_Surf-16_S3, S3
_Surf-16_S2, S2
*Elset, elset=_Surf-17_S2, internal, instance=ellipse_1hole-1
 2,
*Elset, elset=_Surf-17_S1, internal, instance=ellipse_1hole-1
    3,    4,    5,    6,    7,   15
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*Elset, elset=_Surf-17_S3, internal, instance=ellipse_1hole-1
    8,    9,   10,   11,   12,   13
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*Elset, elset=_Surf-17_S4, internal, instance=ellipse_1hole-1
 48,
*Surface, type=ELEMENT, name=Surf-17
_Surf-17_S2, S2
_Surf-17_S1, S1
_Surf-17_S4, S4
_Surf-17_S3, S3
*End Assembly
**
** MATERIALS
**
*Material, name=linear
*Elastic
1000., 0.3
** ----------------------------------------------------------------
**
** STEP: Step-1
**
*Step, name=Step-1, nlgeom=NO
*Static
1., 1., 1e-05, 1.
**
** BOUNDARY CONDITIONS
**
** Name: ellipse_fix Type: Displacement/Rotation
*Boundary
Set-27, 1, 1
Set-27, 2, 2
Set-27, 6, 6
**
** LOADS
**
** Name: left   Type: Pressure Using Field: sin
*Dload, op=NEW
ellipse_1hole-1.2, P2, -1.7278
ellipse_1hole-1.3, P1, -18.9122
ellipse_1hole-1.4, P1, -25.679
ellipse_1hole-1.5, P1, -32.3444
ellipse_1hole-1.6, P1, -38.8822
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ellipse_1hole-1.4252, P1, -48.3933
** Name: right   Type: Pressure Using Field: sin
*Dload, op=NEW
ellipse_1hole-1.1046, P1, -64.9448
ellipse_1hole-1.1048, P1, -69.5913
ellipse_1hole-1.1050, P1, -73.9631
ellipse_1hole-1.1312, P1, -57.5005
ellipse_1hole-1.1313, P3, -60.042
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ellipse_1hole-1.4192, P1, -43.9939
** Name: up   Type: Pressure Using Field: sin up
*Dload, op=NEW
ellipse_1hole-1.1, P1, -4.71064
ellipse_1hole-1.2, P3, -1.57073
ellipse_1hole-1.50, P1, -7.84591
ellipse_1hole-1.99, P1, -14.0901
ellipse_1hole-1.147, P1, -20.2787
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ellipse_1hole-1.4219, P1, -43.9939
**
** OUTPUT REQUESTS
**
*Restart, write, frequency=0
**
** FIELD OUTPUT: F-Output-1
**
*Output, field, variable=PRESELECT
**
** HISTORY OUTPUT: H-Output-1
**
*Output, history, variable=PRESELECT
*End Step
