*Heading
** Job name: 1hole_all_pressure Model name: Model-1
** Generated by: Abaqus/CAE 2018
*Preprint, echo=NO, model=NO, history=NO, contact=NO
**
** PARTS
**
*Part, name=hole1
*End Part
**
**
** ASSEMBLY
**
*Assembly, name=Assembly
**
*Instance, name=hole1-1, part=hole1
*Node
      1,  0.980000019,           1.
      2,  0.959999979,           1.
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*Element, type=CPS8R
   1,  1972,     1,  2608,  8424, 10182, 10183, 10184, 10185
   2,  2179,  8424,  2419,   192, 10186, 10187, 10188, 10189
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*Nset, nset=Set-1, generate
     1,  30266,      1
*Elset, elset=Set-1, generate
    1,  9904,     1
** Section: hole
*Solid Section, elset=Set-1, material=linear
,
*End Instance
**
*Nset, nset=Set-22, instance=hole1-1
    49,    50,    51,    52,    53,    54
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*Elset, elset=Set-22, instance=hole1-1
 1386, 1404, 1416, 1428, 1433, 1434
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*Nset, nset=Set-23, instance=hole1-1
   193,   194,   195,   196,   197,   198
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*Elset, elset=Set-23, instance=hole1-1
  555,  556,  557,  597,  599,  601
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*Elset, elset=_Surf-10_S4, internal, instance=hole1-1
    2,    8,    9,   10,   11,   12
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*Elset, elset=_Surf-10_S2, internal, instance=hole1-1
    3,    4,    5,    6,    7,   16
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*Surface, type=ELEMENT, name=Surf-10
_Surf-10_S4, S4
_Surf-10_S2, S2
*Elset, elset=_Surf-11_S4, internal, instance=hole1-1
    2,    8,    9,   10,   11,   12
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*Elset, elset=_Surf-11_S2, internal, instance=hole1-1
    3,    4,    5,    6,    7,   16
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*Surface, type=ELEMENT, name=Surf-11
_Surf-11_S4, S4
_Surf-11_S2, S2
*Elset, elset=_Surf-12_S1, internal, instance=hole1-1
 1386, 1404, 1416, 1428, 1934, 1969
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*Elset, elset=_Surf-12_S3, internal, instance=hole1-1
 1433, 2024, 2068, 2342, 2382, 3434, 3435, 3440, 3441, 3951
*Elset, elset=_Surf-12_S4, internal, instance=hole1-1
 1434, 3849
*Elset, elset=_Surf-12_S2, internal, instance=hole1-1
 2975, 3014, 3052, 3087, 3431, 3941, 3942, 3944
*Surface, type=ELEMENT, name=Surf-12
_Surf-12_S1, S1
_Surf-12_S3, S3
_Surf-12_S4, S4
_Surf-12_S2, S2
*Elset, elset=_Surf-13_S1, internal, instance=hole1-1
    1,   51,  115,  254,  299,  300
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*Elset, elset=_Surf-13_S3, internal, instance=hole1-1
  163,  209,  534,  580,  690,  944,  950,  951, 1153, 3389, 3419, 3823, 3945
*Elset, elset=_Surf-13_S4, internal, instance=hole1-1
 3816,
*Surface, type=ELEMENT, name=Surf-13
_Surf-13_S1, S1
_Surf-13_S3, S3
_Surf-13_S4, S4
*Elset, elset=_Surf-14_S1, internal, instance=hole1-1
    1,   51,  115,  254,  299,  300
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*Elset, elset=_Surf-14_S3, internal, instance=hole1-1
   50,  163,  209,  534,  580,  690,  944,  950,  951, 1153, 3389, 3419, 3823, 3945
*Elset, elset=_Surf-14_S4, internal, instance=hole1-1
   49,  253,  297,  346,  390,  436
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*Elset, elset=_Surf-14_S2, internal, instance=hole1-1
   99,  100,  101,  162,  208,  252
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*Surface, type=ELEMENT, name=Surf-14
_Surf-14_S1, S1
_Surf-14_S3, S3
_Surf-14_S4, S4
_Surf-14_S2, S2
*End Assembly
**
** MATERIALS
**
*Material, name=linear
*Elastic
1000., 0.3
**
** BOUNDARY CONDITIONS
**
** Name: circle_fixed Type: Displacement/Rotation
*Boundary
Set-23, 1, 1
Set-23, 2, 2
Set-23, 6, 6
** ----------------------------------------------------------------
**
** STEP: Step-1
**
*Step, name=Step-1, nlgeom=NO
*Static
1., 1., 1e-05, 1.
**
** LOADS
**
** Name: left_pressure   Type: Pressure Using Field: sin
*Dload, op=NEW
hole1-1.1386, P1, -5.1817
hole1-1.1404, P1, -102.899
hole1-1.1416, P1, -100.254
hole1-1.1428, P1, -38.8822
hole1-1.1433, P3, -1.7278
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hole1-1.3951, P3, -42.0952
** Name: sin   Type: Pressure Using Field: sin
*Dload, op=NEW
hole1-1.2, P4, -4.71064
hole1-1.3, P2, -7.8459
hole1-1.4, P2, -17.1929
hole1-1.5, P2, -23.3445
hole1-1.6, P2, -29.404
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hole1-1.3728, P4, -10.9734
** Name: sin up   Type: Pressure Using Field: sin up
*Dload, op=NEW
hole1-1.1, P1, -4.71064
hole1-1.51, P1, -7.8459
hole1-1.115, P1, -14.0901
hole1-1.163, P3, -23.3445
hole1-1.209, P3, -26.3873
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hole1-1.3875, P2, -89.8028
**
** OUTPUT REQUESTS
**
*Restart, write, frequency=0
**
** FIELD OUTPUT: F-Output-1
**
*Output, field, variable=PRESELECT
**
** HISTORY OUTPUT: H-Output-1
**
*Output, history, variable=PRESELECT
*End Step

  Part Instance     Node ID  Attached elements     S, S12
----------------------------------------------------------
     HOLE1-1         205        735        24.
     HOLE1-1         205       1931        24.
     HOLE1-1        2204        735        26.
     HOLE1-1        2204       1932        26.
     HOLE1-1         204        734        27.
     HOLE1-1         204       1932        27.
     HOLE1-1        2203        734        29.
     HOLE1-1        2203       1933        29.
     HOLE1-1        2202       1933        30.
     HOLE1-1        2202       3582        30.
     HOLE1-1         203        733        31.
     HOLE1-1         203       3582        31.
     HOLE1-1        2201        733        31.
     HOLE1-1        2201       3581        31.
     HOLE1-1        2200       3580        32.
     HOLE1-1        2200       3581        32.
     HOLE1-1         202        719        32.
     HOLE1-1         202       3580        32.
     HOLE1-1        2199        703        32.
     HOLE1-1        2199        719        32.
     HOLE1-1        2198        702        32.
     HOLE1-1        2198        703        32.
     HOLE1-1         201        702        31.
     HOLE1-1         201        705        31.
     HOLE1-1        2197        705        30.
     HOLE1-1        2197       3579        30.
     HOLE1-1        2196        687        29.
     HOLE1-1        2196       3579        29.
     HOLE1-1         200        687        27.
     HOLE1-1         200        688        27.
     HOLE1-1        2195        674        25.
     HOLE1-1        2195        688        25.
     HOLE1-1        2194        674        23.
     HOLE1-1        2194       3384        23.
     HOLE1-1         199        658        20.
     HOLE1-1         199       3384        20.
     HOLE1-1        2193        658        17.
     HOLE1-1        2193       3578        17.
     HOLE1-1        2192        659        14.
     HOLE1-1        2192       3578        14.
     HOLE1-1         198        659        11.
     HOLE1-1         198       3358        11.
     HOLE1-1        2191        642         8.
     HOLE1-1        2191       3358         8.
     HOLE1-1        2190        642         5.
     HOLE1-1        2190       3577         5.
     HOLE1-1         197        623         2.
     HOLE1-1         197       3577         2.
     HOLE1-1        2189        623  -841.E-03
     HOLE1-1        2189        624  -841.E-03
     HOLE1-1        2188        624        -3.
     HOLE1-1        2188       3576        -3.
     HOLE1-1         196        625        -6.
     HOLE1-1         196       3576        -6.
     HOLE1-1        2187        625        -7.
     HOLE1-1        2187       3575        -7.
     HOLE1-1        2186       3574        -9.
     HOLE1-1        2186       3575        -9.
     HOLE1-1         195        597       -10.
     HOLE1-1         195       3574       -10.
     HOLE1-1        2185        597       -10.
     HOLE1-1        2185        599       -10.
     HOLE1-1        2184        599       -10.
     HOLE1-1        2184       3637       -10.
     HOLE1-1         194        601       -10.
     HOLE1-1         194       3637       -10.
     HOLE1-1        2183        601        -9.
     HOLE1-1        2183       3573        -9.
     HOLE1-1        2182       3572        -7.
     HOLE1-1        2182       3573        -7.
     HOLE1-1         193       3290        -6.
     HOLE1-1         193       3572        -6.
     HOLE1-1        2181       3290        -4.
     HOLE1-1        2181       3300        -4.
     HOLE1-1        2180        555        -2.
     HOLE1-1        2180       3300        -2.
     HOLE1-1        2280        556         4.
     HOLE1-1        2280       1787         4.
     HOLE1-1         243        557         6.
     HOLE1-1         243       1787         6.
     HOLE1-1        2279        557         7.
     HOLE1-1        2279       1789         7.
     HOLE1-1        2278       1789         9.
     HOLE1-1        2278       4094         9.
     HOLE1-1         242       1790        10.
     HOLE1-1         242       4094        10.
     HOLE1-1        2277       1790        10.
     HOLE1-1        2277       3610        10.
     HOLE1-1        2276       3609        10.
     HOLE1-1        2276       3610        10.
     HOLE1-1         241       1794        10.
     HOLE1-1         241       3609        10.
     HOLE1-1        2275       1794         9.
     HOLE1-1        2275       1809         9.
     HOLE1-1        2274       1809         7.
     HOLE1-1        2274       1810         7.
     HOLE1-1         240       1810         5.
     HOLE1-1         240       3608         5.
     HOLE1-1        2273       3607         3.
     HOLE1-1        2273       3608         3.
     HOLE1-1        2272       3208   845.E-03
     HOLE1-1        2272       3607   845.E-03
     HOLE1-1         239       1812        -2.
     HOLE1-1         239       3208        -2.
     HOLE1-1        2271       1812        -5.
     HOLE1-1        2271       3656        -5.
     HOLE1-1        2270       3193        -8.
     HOLE1-1        2270       3656        -8.
     HOLE1-1         238       3157       -11.
     HOLE1-1         238       3193       -11.
     HOLE1-1        2269       1813       -14.
     HOLE1-1        2269       3157       -14.
     HOLE1-1        2268       1813       -17.
     HOLE1-1        2268       3633       -17.
     HOLE1-1         237       3158       -20.
     HOLE1-1         237       3633       -20.
     HOLE1-1        2267       1814       -23.
     HOLE1-1        2267       3158       -23.
     HOLE1-1        2266       1814       -25.
     HOLE1-1        2266       3606       -25.
     HOLE1-1         236       1825       -27.
     HOLE1-1         236       3606       -27.
     HOLE1-1        2265       1825       -29.
     HOLE1-1        2265       1836       -29.
     HOLE1-1        2264       1836       -30.
     HOLE1-1        2264       3605       -30.
     HOLE1-1         235       3605       -31.
     HOLE1-1         235       3640       -31.
     HOLE1-1        2263       2723       -32.
     HOLE1-1        2263       3640       -32.
     HOLE1-1        2262       2722       -32.
     HOLE1-1        2262       2723       -32.
     HOLE1-1         234       2722       -32.
     HOLE1-1         234       3604       -32.
     HOLE1-1        2261       2721       -32.
     HOLE1-1        2261       3604       -32.
     HOLE1-1        2260       2721       -31.
     HOLE1-1        2260       3603       -31.
     HOLE1-1         233       1852       -31.
     HOLE1-1         233       3603       -31.
     HOLE1-1        2259       1839       -30.
     HOLE1-1        2259       1852       -30.
     HOLE1-1        2258       1613       -29.
     HOLE1-1        2258       1839       -29.
     HOLE1-1         232       1613       -27.
     HOLE1-1         232       1614       -27.
     HOLE1-1        2257       1594       -26.
     HOLE1-1        2257       1614       -26.
     HOLE1-1        2256       1594       -24.
     HOLE1-1        2256       1615       -24.
     HOLE1-1         231       1593       -23.
     HOLE1-1         231       1615       -23.
     HOLE1-1        2255       1593       -21.
     HOLE1-1        2255       1853       -21.
     HOLE1-1         230       1592       -19.
     HOLE1-1         230       1853       -19.
     HOLE1-1        2254       1592       -18.
     HOLE1-1        2254       1854       -18.
     HOLE1-1        2253       1854       -16.
     HOLE1-1        2253       3602       -16.
     HOLE1-1         229       1591       -14.
     HOLE1-1         229       3602       -14.
     HOLE1-1        2252       1591       -13.
     HOLE1-1        2252       3644       -13.
     HOLE1-1        2251       3601       -11.
     HOLE1-1        2251       3644       -11.
     HOLE1-1         228       3601       -10.
     HOLE1-1         228       3636       -10.
     HOLE1-1        2250       1577        -8.
     HOLE1-1        2250       3636        -8.
     HOLE1-1        2249       1562        -7.
     HOLE1-1        2249       1577        -7.
     HOLE1-1         227       1561        -6.
     HOLE1-1         227       1562        -6.
     HOLE1-1        2248       1561        -5.
     HOLE1-1        2248       3600        -5.
     HOLE1-1        2247       2703        -4.
     HOLE1-1        2247       3600        -4.
     HOLE1-1         226       1548        -3.
     HOLE1-1         226       2703        -3.
     HOLE1-1        2246       1548        -2.
     HOLE1-1        2246       3599        -2.
     HOLE1-1        2245       1532        -1.
     HOLE1-1        2245       3599        -1.
     HOLE1-1         225       1516  -767.E-03
     HOLE1-1         225       1532  -767.E-03
     HOLE1-1        2244       1514  -246.E-03
     HOLE1-1        2244       1516  -246.E-03
     HOLE1-1        2243       1514   191.E-03
     HOLE1-1        2243       1515   191.E-03
     HOLE1-1         224       1515   549.E-03
     HOLE1-1         224       2660   549.E-03
     HOLE1-1        2242       1497   836.E-03
     HOLE1-1        2242       2660   836.E-03
     HOLE1-1        2241       1497         1.
     HOLE1-1        2241       1498         1.
     HOLE1-1         223       1479         1.
     HOLE1-1         223       1498         1.
     HOLE1-1         223       3691         1.
     HOLE1-1        2240       1479         1.
     HOLE1-1        2240       3598         1.
     HOLE1-1        2239       3597         1.
     HOLE1-1        2239       3598         1.
     HOLE1-1         222       1481         1.
     HOLE1-1         222       3597         1.
     HOLE1-1        2238       1481         1.
     HOLE1-1        2238       3596         1.
     HOLE1-1        2237       3595         1.
     HOLE1-1        2237       3596         1.
     HOLE1-1         221       1454         1.
     HOLE1-1         221       3595         1.
     HOLE1-1        2236       1454         1.
     HOLE1-1        2236       3594         1.
     HOLE1-1        2235       3593         1.
     HOLE1-1        2235       3594         1.
     HOLE1-1         220       1457   989.E-03
     HOLE1-1         220       3593   989.E-03
     HOLE1-1        2234       1457   846.E-03
     HOLE1-1        2234       3592   846.E-03
     HOLE1-1        2233       2576   692.E-03
     HOLE1-1        2233       3592   692.E-03
     HOLE1-1         219       2576   527.E-03
     HOLE1-1         219       3661   527.E-03
     HOLE1-1        2232        819   355.E-03
     HOLE1-1        2232       3661   355.E-03
     HOLE1-1        2231        819   179.E-03
     HOLE1-1        2231        820   179.E-03
     HOLE1-1         218        820   107.E-06
     HOLE1-1         218       3642   107.E-06
     HOLE1-1        2230       1855  -178.E-03
     HOLE1-1        2230       3642  -178.E-03
     HOLE1-1        2229       1855  -355.E-03
     HOLE1-1        2229       3590  -355.E-03
     HOLE1-1         217        821  -526.E-03
     HOLE1-1         217       3590  -526.E-03
     HOLE1-1        2228        821  -691.E-03
     HOLE1-1        2228       3589  -691.E-03
     HOLE1-1        2227       3588  -846.E-03
     HOLE1-1        2227       3589  -846.E-03
     HOLE1-1         216       1857  -989.E-03
     HOLE1-1         216       3588  -989.E-03
     HOLE1-1        2226       1857        -1.
     HOLE1-1        2226       3587        -1.
     HOLE1-1        2225       1860        -1.
     HOLE1-1        2225       3587        -1.
     HOLE1-1         215       1860        -1.
     HOLE1-1         215       1878        -1.
     HOLE1-1        2224       1878        -1.
     HOLE1-1        2224       3586        -1.
     HOLE1-1        2223       1879        -1.
     HOLE1-1        2223       3586        -1.
     HOLE1-1         214       1879        -1.
     HOLE1-1         214       3679        -1.
     HOLE1-1        2222       2497        -1.
     HOLE1-1        2222       3679        -1.
     HOLE1-1        2221       2496        -1.
     HOLE1-1        2221       2497        -1.
     HOLE1-1         213       1880        -1.
     HOLE1-1         213       2496        -1.
     HOLE1-1        2220       1880        -1.
     HOLE1-1        2220       3682        -1.
     HOLE1-1        2219       2483  -833.E-03
     HOLE1-1        2219       3682  -833.E-03
     HOLE1-1         212       2431  -543.E-03
     HOLE1-1         212       2483  -543.E-03
     HOLE1-1        2218       1881  -176.E-03
     HOLE1-1        2218       2431  -176.E-03
     HOLE1-1        2217       1881   249.E-03
     HOLE1-1        2217       2432   249.E-03
     HOLE1-1         211       2432   767.E-03
     HOLE1-1         211       3675   767.E-03
     HOLE1-1        2216       1882         1.
     HOLE1-1        2216       3675         1.
     HOLE1-1        2215       1882         2.
     HOLE1-1        2215       3585         2.
     HOLE1-1         210       1893         3.
     HOLE1-1         210       3585         3.
     HOLE1-1        2214       1893         4.
     HOLE1-1        2214       1904         4.
     HOLE1-1        2213       1904         5.
     HOLE1-1        2213       3584         5.
     HOLE1-1         209       3584         6.
     HOLE1-1         209       3664         6.
     HOLE1-1        2212       2396         7.
     HOLE1-1        2212       3664         7.
     HOLE1-1        2211       1916         8.
     HOLE1-1        2211       2396         8.
     HOLE1-1         208       1916        10.
     HOLE1-1         208       1921        10.
     HOLE1-1        2210       1921        11.
     HOLE1-1        2210       1922        11.
     HOLE1-1        2209       1922        13.
     HOLE1-1        2209       3583        13.
     HOLE1-1         207       2363        14.
     HOLE1-1         207       3583        14.
     HOLE1-1        2208       1926        16.
     HOLE1-1        2208       2363        16.
     HOLE1-1        2207       1926        18.
     HOLE1-1        2207       2364        18.
     HOLE1-1         206       1930        19.
     HOLE1-1         206       2364        19.
     HOLE1-1        2206        736        21.
     HOLE1-1        2206       1930        21.
     HOLE1-1        2205        736        23.
     HOLE1-1        2205       1931        23.
