*Heading
 P = 100, and cos force on the right side
** Job name: rectangle Model name: Model-1
** Generated by: Abaqus/CAE 2018
*Preprint, echo=NO, model=NO, history=NO, contact=NO
**
** PARTS
**
*Part, name=Part-1
*End Part
**
**
** ASSEMBLY
**
*Assembly, name=Assembly
**
*Instance, name=Part-1-1, part=Part-1
*Node
      1,           0.,           0.
      2, 0.00999999978,           0.
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*Element, type=CPS8R
    1,     1,     2,   103,   102, 10202, 10203, 10204, 10205
    2,     2,     3,   104,   103, 10206, 10207, 10208, 10203
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*Nset, nset=Set-1, generate
     1,  30401,      1
*Elset, elset=Set-1, generate
     1,  10000,      1
** Section: linear_elasticity
*Solid Section, elset=Set-1, material=linear_elasticity
,
*End Instance
**
*Nset, nset=Set-1, instance=Part-1-1
     1,   102,   203,   304,   405,   506
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*Elset, elset=Set-1, instance=Part-1-1, generate
    1,  9901,   100
*Nset, nset=Set-2, instance=Part-1-1
     1,     2,     3,     4,     5,     6
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*Elset, elset=Set-2, instance=Part-1-1, generate
   1,  100,    1
*Elset, elset=_Surf-1_S2, internal, instance=Part-1-1, generate
   100,  10000,    100
*Surface, type=ELEMENT, name=Surf-1
_Surf-1_S2, S2
*End Assembly
**
** MATERIALS
**
*Material, name=linear_elasticity
*Elastic
1000., 0.3
**
** BOUNDARY CONDITIONS
**
** Name: ux_left Type: Displacement/Rotation
*Boundary
Set-1, 1, 1
Set-1, 6, 6
** ----------------------------------------------------------------
**
** STEP: Step-1
**
*Step, name=Step-1, nlgeom=NO
*Static
1., 1., 1e-05, 1.
**
** BOUNDARY CONDITIONS
**
** Name: ux_left Type: Displacement/Rotation
*Boundary
Set-1, 2, 2
**
** LOADS
**
** Name: right   Type: Pressure Using Field: cos
*Dload
Part-1-1.100, P2, -1.57073
Part-1-1.200, P2, -4.71064
Part-1-1.300, P2, -7.84591
Part-1-1.400, P2, -10.9734
Part-1-1.500, P2, -14.0901
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Part-1-1.10000, P2, -1.57073
**
** OUTPUT REQUESTS
**
*Restart, write, frequency=0
**
** FIELD OUTPUT: F-Output-1
**
*Output, field, variable=PRESELECT
**
** HISTORY OUTPUT: H-Output-1
**
*Output, history, variable=PRESELECT
*End Step
